# OpenSim document version 40000
AnalyzeTool Right-scaled:
  model_file: C:\Users\bradl\Documents\GitHub\Python-OpenSim-Scripts\Get_Body_Oris_From_Coords_File\das3_scaled_and_placed.osim
  replace_force_set: false
  results_directory: C:\Users\bradl\Documents\GitHub\Python-OpenSim-Scripts\Get_Body_Oris_From_Coords_File\20thDecIK_Results
  output_precision: 8
  initial_time: 8501
  final_time: 27601
  solve_for_equilibrium_for_auxiliary_states: false
  maximum_number_of_integrator_steps: 20000
  maximum_integrator_step_size: 1
  minimum_integrator_step_size: 1e-8
  integrator_error_tolerance: 1e-5
  coordinates_file: C:\Users\bradl\Documents\GitHub\Python-OpenSim-Scripts\Get_Body_Oris_From_Coords_File\OMC_IK_results.mot
  lowpass_cutoff_frequency_for_coordinates: -1
  AnalysisSet Analyses:
    StatesReporter: start_time=0 end_time=1 step_interval=1 in_degrees=true
